*Heading
** Job name: SOLID_NECK Model name: SOLID_NECK_EX
** Generated by: Abaqus/CAE 2020
*Preprint, echo=NO, model=NO, history=NO, contact=NO
**
** PARTS
**
*Part, name=Part-1
*Node
      1,          10.,         100.,           1.
      2,          10.,   34.9951897,           1.
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*Element, type=C3D8R
  1,  162,  371, 1285,  353,    1,   19,  289,   84
  2,  371,  372, 1286, 1285,   19,   20,  290,  289
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*Nset, nset=BODY, generate
    1,  1716,     1
*Elset, elset=BODY, generate
    1,  1020,     1
*Nset, nset=GRIP_BODY
    1,    2,    3,    4,    5,    6
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*Elset, elset=GRIP_BODY, generate
   1,  660,    1
*Orientation, name=Ori-1
1., 0., 0., 0., 1., 0.
3, 0.
** Section: Section-1
*Solid Section, elset=BODY, orientation=Ori-1, material=AA2024-O-UMAT
,
*End Part
**
**
** ASSEMBLY
**
*Assembly, name=Assembly
**
*Instance, name=Part-1-1, part=Part-1
          0.,           0.,         -0.5
*End Instance
**
*Node
      1,           0.,         100.,          0.5
*Nset, nset=CENTER, instance=Part-1-1
  11,  12,  13,  14, 185, 186
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*Nset, nset=GRIP-RP
 1,
** Constraint: Constraint-1
*Rigid Body, ref node=GRIP-RP, elset=Part-1-1.GRIP_BODY
*End Assembly
**
** MATERIALS
**
*Material, name=AA2024-O-ABA
*Density
 2.78e-09,
*Elastic
71500., 0.33
*Plastic
 38.1482,     0.
 54.6753, 0.0005
 60.0903,  0.001
 64.2632, 0.0015
 67.8234,  0.002
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 310.607,     1.
*Porous Metal Plasticity, relative density=1.
 1.5,   1., 2.25
*Porous Failure Criteria
        0.13,         0.12
*Void Nucleation
 0.3,  0.1, 0.05
*Material, name=AA2024-O-UMAT
*Density
 2.78e-09,
*Depvar, delete=75
     75,
*User Material, constants=60
0.,     1.,     6.,    -1.,      1.,     2., 71500.,   0.33
  0.612,  347.7,     0.,  0.347,  252.1, 153.78,   44.2,     0.
     0.,     0.,     0.,     0.,     0.,     0.,     0.,     0.
     0.,     0.,     0.,     0.,     0.,     0.,     0.,     0.
     0.,     0.,     0.,     0.,     0.,     0.,     0.,     0.
     0.,     0.,     0.,     0.,     0.,     0.,     0.,     0.
     0.,     0.,    1.5,     1.,   2.25,     0.,   0.13,   0.12
    0.3,    0.1,   0.05,     0.
** ----------------------------------------------------------------
**
** STEP: TENS
**
*Step, name=TENS, nlgeom=YES
*Dynamic, Explicit
, 0.01
*Bulk Viscosity
0.06, 1.2
**
** BOUNDARY CONDITIONS
**
** Name: BC-1 Type: Symmetry/Antisymmetry/Encastre
*Boundary
CENTER, YSYMM
** Name: BC-2 Type: Velocity/Angular velocity
*Boundary, type=VELOCITY
GRIP-RP, 1, 1
GRIP-RP, 2, 2, 800.
GRIP-RP, 3, 3
**
** OUTPUT REQUESTS
**
*Restart, write, number interval=1, time marks=NO
**
** FIELD OUTPUT: F-Output-1
**
*Output, field, number interval=100
*Node Output
A, RF, U, V
*Element Output, directions=YES
EVF, LE, PE, PEEQ, PEEQVAVG, PEVAVG, S, SDV, SVAVG, TRIAX
*Contact Output
CSTRESS,
**
** FIELD OUTPUT: F-Output-2
**
*Element Output, directions=YES
VVF, VVFG, VVFN
**
** HISTORY OUTPUT: H-Output-1
**
*Output, history, variable=PRESELECT
*End Step
