*Heading
** Job name: TR1180_TENS Model name: TR1180_UTENS
** Generated by: Abaqus/CAE 2020
*Preprint, echo=NO, model=NO, history=NO, contact=NO
**
** PARTS
**
*Part, name=SPECIMEN
*Node
      1,  -4.56657743,        -160.,           0.
      2,  -3.56657767,        -160.,           0.
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*Element, type=C3D8R
    1,    85,    86,   107,   106,     1,     2,    23,    22
    2,    86,    87,   108,   107,     2,     3,    24,    23
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*Nset, nset=_PICKEDSET56, internal, generate
     1,  20832,      1
*Elset, elset=_PICKEDSET56, internal, generate
     1,  14820,      1
*Orientation, name=Ori-1
          1.,           0.,           0.,           0.,           1.,           0.
3, -90.
** Section: Section-1-_PICKEDSET56
*Solid Section, elset=_PICKEDSET56, orientation=Ori-1, controls=EC-1, material=TR1180
,
*End Part
**
**
** ASSEMBLY
**
*Assembly, name=Assembly
**
*Instance, name=SPECIMEN-1, part=SPECIMEN
*End Instance
**
*Node
      1,   5.43342257,          85.,  0.600000024
      2,   5.43342257,        -160.,  0.600000024
*Elset, elset=L_GRIP, instance=SPECIMEN-1, generate
    1,  5100,     1
*Nset, nset=P1
 1,
*Nset, nset=P2
 2,
*Elset, elset=U_GRIP, instance=SPECIMEN-1, generate
  9721,  14820,      1
*Nset, nset=_PICKEDSET9, internal
 1,
*Nset, nset=_PICKEDSET10, internal
 2,
*Nset, nset=_PickedSet11, internal
 1,
*Nset, nset=_PickedSet12, internal
 2,
** Constraint: RigidBody-1
*Rigid Body, ref node=_PickedSet11, elset=U_GRIP
** Constraint: RigidBody-2
*Rigid Body, ref node=_PickedSet12, elset=L_GRIP
*End Assembly
**
** ELEMENT CONTROLS
**
*Section Controls, name=EC-1, ELEMENT DELETION=YES, hourglass=ENHANCED
1., 1., 1.
*Amplitude, name=AMP-1
             0.,              0.,              1.,              1.
**
** MATERIALS
**
*Material, name=TR1180
*Density
 7.8e-09,
*Depvar, delete=55
     55,
*User Material, constants=55
0.,     4.,     1.,     5.,     1.,     2.,195620.,   0.33
  1946.,  0.016,   0.15,     0.,     0.,     0.,     0.,     0.
     0.,     0.,     0.,     0.,     0.,     0.,     0.,     0.
     0.,     0.,     0.,     0.,     0.,     0.,     0.,     6.
     1.,     1.,  0.998,  0.982,  1.005,  1.002,     1.,  1.002
  0.997,  0.967,  1.039,  0.998,  1.003,  0.997,  1.007,     1.
  1.002,   0.99,   2.09,     0.,     0.,     0.,     0.
**
** BOUNDARY CONDITIONS
**
** Name: Disp-BC-1 Type: Displacement/Rotation
*Boundary
P1, 1, 1
** Name: Disp-BC-2 Type: Displacement/Rotation
*Boundary
P1, 2, 2
** Name: Disp-BC-3 Type: Displacement/Rotation
*Boundary
P1, 3, 3
** Name: Disp-BC-4 Type: Displacement/Rotation
*Boundary
P1, 4, 4
** Name: Disp-BC-5 Type: Displacement/Rotation
*Boundary
P1, 5, 5
** Name: Disp-BC-6 Type: Displacement/Rotation
*Boundary
P1, 6, 6
** ----------------------------------------------------------------
**
** STEP: Step-1
**
*Step, name=Step-1, nlgeom=YES
*Dynamic, Explicit
, 0.01
*Bulk Viscosity
0.06, 1.2
** Mass Scaling: Semi-Automatic
**               Whole Model
*Fixed Mass Scaling, dt=1e-06, type=below min
**
** BOUNDARY CONDITIONS
**
** Name: Vel-BC-1 Type: Velocity/Angular velocity
*Boundary, type=VELOCITY
P2, 2, 2, -1500.
**
** OUTPUT REQUESTS
**
*Restart, write, number interval=1, time marks=NO
**
** FIELD OUTPUT: F-Output-1
**
*Output, field
*Element Output, directions=YES
LE, PE, PEEQ, S, SDV, STATUS
**
** FIELD OUTPUT: F-Output-2
**
*Node Output
RF, U
**
** HISTORY OUTPUT: H-Output-1
**
*Output, history, variable=PRESELECT, frequency=1
*End Step
